// COMSOL Multiphysics 6.0.0.405 model "HL1_wineglass_marco.mph"
// Outline of the model tree
// Components: comp1 "Component 1", comp2 "Component 2"

Parameters
  D1 = 50[mm]
  D2 = 75[mm]
  h1 = 10[mm]
  h2 = 60[mm]
  h3 = 10[mm]
  h4 = 40[mm]
  h5 = 150[mm]
  t1 = 6[mm]
  t2 = 2[mm]
  t3 = 1[mm]
  b = 2.5
  F = 0.5
  D3 = 0.09[m]

Common definitions
  mpf1: ParticipationFactors [comp1]
  mpf2: ParticipationFactors [comp2]

Geometry
  geom1 "Geometry 1" [comp1] (3D, length unit m)
    wp1: WorkPlane | unite = on
      qb1: QuadraticBezier "Quadratic Bézier 1" | p = {{0, 0.07, D3}, {0, 0.002, h4}}
      qb2: QuadraticBezier "Quadratic Bézier 2" | p = {{D3, 0.11, D1}, {h4, 0.09, h5}}
      pol1: Polygon | type = open; source = table; table = {{0, 0}, {0, -(h3+h2+0.005)}}
      qb3: QuadraticBezier "Quadratic Bézier 3" | p = {{15*t3, 0.07+t3, D3+t3}, {0, 0, h4}}
      qb4: QuadraticBezier "Quadratic Bézier 4" | p = {{D3+t3, 0.11+t3, D1+t3}, {h4, 0.09, h5}}
      pol2: Polygon | type = open; source = table; table = {{t1, -h3}, {t1, -(h3+h2)}}
      qb5: QuadraticBezier "Quadratic Bézier 5" | p = {{15*t3, t1, t1}, {0, 0, -h3}}
      qb6: QuadraticBezier "Quadratic Bézier 6" | p = {{t1, 0.01, D2}, {-(h3+h2), -(h3+h2+h1), -(h3+h2+h1)}}
      qb7: QuadraticBezier "Quadratic Bézier 7" | p = {{0, 0.001, D2}, {-(h3+h2+0.005), -(h3+h2+h1+t2), -(h3+h2+h1+t2)}}
      pol3: Polygon | type = open; source = table; table = {{0.05, 0.15}, {0.051, 0.15}}
      pol4: Polygon | type = open; source = table; table = {{0.075, -0.08}, {0.075, -0.082}}
      pol5: Polygon | type = open; source = table; table = {{0.05, 0.15}, {0.051, 0.15}}
    rev1: Revolve | workplane = wp1; input = wp1; angtype = full
    csol1: ConvertToSolid | input = rev1
    fin: Finalize "Form Union"
  geom2 "Geometry 2" [comp2] (2D axisymmetric, length unit m)
    imp1: Import | type = sequence; sequence = sequence2D
    csol1: ConvertToSolid (disabled)
      input = imp1(1), imp1(11), imp1(12), imp1(2), imp1(3), imp1(5), imp1(6), imp1(7), imp1(8), imp1(9)
      keep = on
    pol1: Polygon | type = open; source = table; table = {{0, 0}, {0, -0.075}}
    csol2: ConvertToSolid
      input = imp1(1), imp1(11), imp1(12), imp1(2), imp1(4), imp1(5), imp1(6), imp1(7), imp1(8), imp1(9), pol1
    fin: Finalize "Form Union"

Materials
  mat1: Common "Material 1"
    def "Basic"
      density = 2203
    Enu "Young's modulus and Poisson's ratio"
      E = 73.1[GPa]
      nu = 0.17
  matlnk1: Link "Material Link 1" [comp1] on domains 1
  matlnk2: Link "Material Link 2" [comp2] on domains 1

Physics
  solid: SolidMechanics [geom1] on all domains
    dependent variable u = {u, v, w}
    lemm1: LinearElasticModel "Linear Elastic Material 1" (default)
    free1: Free (default)
    init1: init "Initial Values 1" (default)
    fix1: Fixed "Fixed Constraint 1" on boundaries 9-14, 21-26
  solid2: SolidMechanics [geom2] on all domains
    dependent variable u2 = {u2, v2, w2}
    Mode2Daxi.includeTwist = 1
    Mode2Daxi.ModeExtension = 1
    lemm1: LinearElasticModel "Linear Elastic Material 1" (default)
    axi1: AxialSymmetrySolid "Axial Symmetry 1" (default)
    free1: Free (default)
    init1: init "Initial Values 1" (default)
    fix1: Fixed "Fixed Constraint 1" on boundaries 4, 5, 7

Mesh
  mesh1 "Mesh 1" [geom1]
    size: MeshSizeDefault | hmax = 0.0186; hmin = 0.00232; hcurve = 0.5; hnarrow = 0.6; hgrad = 1.45; hauto = 4
    ftet1: FreeTet "Free Tetrahedral 1" on entire geometry
  mesh2 "Mesh 2" [geom2]
    size: MeshSizeDefault | hauto = 4
    ftri1: FreeTri "Free Triangular 1" on entire geometry

Studies
  std1 "Study 1"
    eig: Eigenfrequency | neigs = 20; shift = 100[Hz]; conrad = 1; solve for = {solid}
  std2 "Study 2"
    eig: Eigenfrequency | neigs = 20; shift = 10[Hz]; conrad = 1; solve for = {solid2}

Solver configurations
  sol1 "Solution 1" (study std1)
    v1: Variables "Dependent Variables 1"
    e1: Eigenvalue "Eigenvalue Solver 1" | rtol = 1.0E-3; eigvfunscale = maximum; eigvfunscaleparam = 3.9e-07
      dDef: Direct
  sol2 "Solution 2" (study std2)
    v1: Variables "Dependent Variables 1"
    e1: Eigenvalue "Eigenvalue Solver 1" | rtol = 1.0E-3; eigvfunscale = maximum; eigvfunscaleparam = 2.5E-7
      dDef: Direct

Datasets
  dset1: Solution | solution = sol1
  dset2: Solution | solution = sol2
  dset3: Solution | solution = sol2
  rev1: Revolve2D "Revolution 2D 1" | data = dset3; startangle = -90; revangle = 225; modenumber = solid2.mk

Evaluation groups
  std1EvgFrq: EvaluationGroup "Eigenfrequencies (Study 1)" | data = dset1
    gev1: EvalGlobal "Global Evaluation 1"
      expr = {freq*2*pi, imag(freq)/abs(freq), abs(freq)/imag(freq)/2}
      unit = {rad/s, 1, 1}
      descr = {Angular frequency, Damping ratio, Quality factor}
  std1mpf1: EvaluationGroup "Participation Factors (Study 1)" | data = dset1
    gev1: EvalGlobal "Global Evaluation 1"
      expr = {mpf1.pfLnormX, mpf1.pfLnormY, mpf1.pfLnormZ, mpf1.pfRnormX, mpf1.pfRnormY, mpf1.pfRnormZ, mpf1.mEffLX, mpf1.mEffLY, mpf1.mEffLZ, mpf1.mEffRX, mpf1.mEffRY, mpf1.mEffRZ}
      unit = {1, 1, 1, 1, 1, 1, kg, kg, kg, kg*m^2, kg*m^2, kg*m^2}
      descr = {"Participation factor, normalized, X-translation", "Participation factor, normalized, Y-translation", "Participation factor, normalized, Z-translation", "Participation factor, normalized, X-rotation", "Participation factor, normalized, Y-rotation", "Participation factor, normalized, Z-rotation", "Effective modal mass, X-translation", "Effective modal mass, Y-translation", "Effective modal mass, Z-translation", "Effective modal mass, X-rotation", "Effective modal mass, Y-rotation", "Effective modal mass, Z-rotation"}
  std2EvgFrq: EvaluationGroup "Eigenfrequencies (Study 2)" | data = dset3
    gev1: EvalGlobal "Global Evaluation 1"
      expr = {freq*2*pi, imag(freq)/abs(freq), abs(freq)/imag(freq)/2}
      unit = {rad/s, 1, 1}
      descr = {Angular frequency, Damping ratio, Quality factor}
  std2mpf1: EvaluationGroup "Participation Factors (Study 2)" | data = dset2
    gev1: EvalGlobal "Global Evaluation 1"
      expr = {mpf1.pfLnormX, mpf1.pfLnormY, mpf1.pfLnormZ, mpf1.pfRnormX, mpf1.pfRnormY, mpf1.pfRnormZ, mpf1.mEffLX, mpf1.mEffLY, mpf1.mEffLZ, mpf1.mEffRX, mpf1.mEffRY, mpf1.mEffRZ}
      unit = {1, 1, 1, 1, 1, 1, kg, kg, kg, kg*m^2, kg*m^2, kg*m^2}
      descr = {"Participation factor, normalized, X-translation", "Participation factor, normalized, Y-translation", "Participation factor, normalized, Z-translation", "Participation factor, normalized, X-rotation", "Participation factor, normalized, Y-rotation", "Participation factor, normalized, Z-rotation", "Effective modal mass, X-translation", "Effective modal mass, Y-translation", "Effective modal mass, Z-translation", "Effective modal mass, X-rotation", "Effective modal mass, Y-rotation", "Effective modal mass, Z-rotation"}
  std2mpf2: EvaluationGroup "Participation Factors (Study 2) 1" | data = dset3
    gev1: EvalGlobal "Global Evaluation 1"
      expr = {mpf2.pfLnormR, mpf2.pfLnormZ, mpf2.pfRnormZ, mpf2.mEffLR, mpf2.mEffLZ, mpf2.mEffRZ}
      unit = {1, 1, 1, kg, kg, kg*m^2}
      descr = {"Participation factor, normalized, R-translation", "Participation factor, normalized, Z-translation", "Participation factor, normalized, Z-rotation", "Effective modal mass, R-translation", "Effective modal mass, Z-translation", "Effective modal mass, Z-rotation"}

Plots
  pg1: PlotGroup3D "Mode Shape (solid)" | data = dset1
    surf1: Surface | expr = solid.disp
      def: Deform "Deformation" | expr = {u, v, w}; descr = Displacement field
  pg2: PlotGroup2D "Mode Shape (solid2)" | data = dset3
    surf1: Surface | expr = solid2.disp
      def: Deform "Deformation" | expr = {u2, w2}; descr = Displacement field
  pg3: PlotGroup3D "Mode Shape, 3D (solid2)" | data = rev1
    surf1: Surface | expr = solid2.disp
      def: Deform "Deformation" | revcoordsys = cylindrical; expr = {u2, v2, w2}; descr = Displacement field

Exports
  anim2: Animation | giffilename = /Users/meng/Downloads/modeshape_animation1.gif; maxframes = 20
  anim3: Animation | giffilename = /Users/meng/Downloads/2.gif; maxframes = 2
  anim4: Animation | giffilename = /Users/meng/Downloads/3.gif; maxframes = 7